<?xml version="1.0"?>
<!--
*****************************************************
This file is part of U-2S.

Copyright 2014 Cem Aydin
(See Licensing for detailed information.)

Lockheed U-2S for FlightGear flight simulator

*****************************************************

GE-F118-101 JSBSim Engine
=========================

  - changed tsfc
  - manually extended the tables to higher altitudes
  - bypassratio 2.0 [^byp]
  - corrected milthrust to 17000.0 lb

[^byp]: Only found one source for this by now: http://wiki.scramble.nl/index.php/General_Electric_F101

  File:     GE-F118-101.xml
  Author:   Aero-Matic v 0.82 / Cem Aydin
  Inputs:
    name:           GE-F118-101
    type:           turbine
    thrust:         19000 lb
    augmented?      no
    injected?       no
-->

<turbine_engine name="GE-F118-101">
  <milthrust> 17000.0 </milthrust>
  <bypassratio>     2.0 </bypassratio>
  <tsfc>            0.67 </tsfc> <!-- aeromatic default was 0.8 -->
  <bleed>           0.03</bleed>
  <idlen1>         30.0 </idlen1>
  <idlen2>         60.0 </idlen2>
  <maxn1>         100.0 </maxn1>
  <maxn2>         100.0 </maxn2>
  <augmented>         0 </augmented>
  <injected>          0 </injected>

  <function name="IdleThrust">
   <table>
    <independentVar lookup="row">velocities/mach</independentVar>
    <independentVar lookup="column">atmosphere/density-altitude</independentVar>
    <tableData>													  <!-- extended the table (last value * previous factor) -->
         -10000     0     10000   20000   30000   40000   50000   60000   70000   80000   90000
     0.0  0.0430  0.0488  0.0528  0.0694  0.0899  0.1183  0.1467  0.1819  0.2256  0.2797  0
     0.2  0.0500  0.0501  0.0335  0.0544  0.0797  0.1049  0.1342  0.1716  0.2196  0.2809  0
     0.4  0.0040  0.0047  0.0020  0.0272  0.0595  0.0891  0.1203  0.1624  0.2193  0.2961  0
     0.6  0.0     0.0     0.0     0.0     0.0276  0.0718  0.1073  0.1603  0.2396  0.3581  0
     0.8  0.0     0.0     0.0     0.0     0.0474  0.0868  0.0900  0.0933  0.0967  0.1003  0
     1.0  0.0     0.0     0.0     0.0     0.0     0.0552  0.0800  0.1159  0.1680  0.2435  0
    </tableData>
   </table>
  </function>

  <function name="MilThrust">
   <table>
    <independentVar lookup="row">velocities/mach</independentVar>
    <independentVar lookup="column">atmosphere/density-altitude</independentVar>
    <tableData>													   <!-- extended the table (last value * factor) -->
    												 <!-- factor:  0.6     0.58    0.56 -->
          -10000       0   10000   20000   30000   40000   50000   60000   70000   80000   90000
     0.0   1.2600  1.0000  0.7400  0.5340  0.3720  0.2410  0.1490  0.0894  0.0519  0.0290  0
     0.2   1.1710  0.9340  0.6970  0.5060  0.3550  0.2310  0.1430  0.0858  0.0498  0.0279  0
     0.4   1.1500  0.9210  0.6920  0.5060  0.3570  0.2330  0.1450  0.0870  0.0505  0.0283  0
     0.6   1.1810  0.9510  0.7210  0.5320  0.3780  0.2480  0.1540  0.0924  0.0536  0.0300  0
     0.8   1.2580  1.0200  0.7820  0.5820  0.4170  0.2750  0.1700  0.1020  0.0592  0.0331  0
     1.0   1.3690  1.1200  0.8710  0.6510  0.4750  0.3150  0.1950  0.1170  0.0679  0.0380  0
     1.2   1.4850  1.2300  0.9750  0.7440  0.5450  0.3640  0.2250  0.1350  0.0783  0.0438  0
     1.4   1.5941  1.3400  1.0860  0.8450  0.6280  0.4240  0.2630  0.1578  0.0915  0.0513  0
    </tableData>
   </table>
  </function>

</turbine_engine>
